// SBML level 3 version 2

model Test()

  // Compartments:
  compartment Vessel_1 = 10 u0;

  // Species:
  species Enzyme in Vessel_1;
  species Substrate in Vessel_1 = 0;
  species Product in Vessel_1 = 10;

  // Parameters:
  kcat has u4;
  K_m has u1;

  // Reactions:
  Reaction_1: Substrate => Product; kcat*Enzyme*Substrate/(K_m + Substrate);  // modifiers: Enzyme

  // Unit definitions:
  unit u0 = 1e-3 litre; u0 is "ml";
  unit u1 = 1e-3 mole / (10 litre); u1 is "mmol / l";
  unit u2 = 10 second; u2 is "s";
  unit u3 = 10 kelvin; u3 is "K";
  unit u4 = 1 / (10 second); u4 is "1 / s";
end
