// SBML level 3 version 2

model Test()

  // Compartments:
  compartment Vessel_1 = 10 u0;

  // Species:
  species Enzyme in Vessel_1;
  species Substrate in Vessel_1 = 0;
  species Product in Vessel_1 = 10;

  // Parameters:
  K_m has u1;
  kcat has u2;

  // Reactions:
  Reaction_1: Substrate => Product; kcat*Enzyme*Substrate/(K_m + Substrate);  // modifiers: Enzyme

  // Unit definitions:
  unit u0 = 1e-3 litre; u0 is "ml";
  unit u1 = 1e-3 mole / (10 litre); u1 is "mmol / l";
  unit u2 = 1 / (10 second); u2 is "1 / s";
  unit u3 = 1 / (10 second); u3 is "s";
  unit u4 = 10 kelvin; u4 is "K";
end
