// SBML level 3 version 2

model 3IZNOK_TEST()

  // Compartments:
  compartment Vessel;

  // Species:
  species $TrpB2o_from_Arabidopsis_thaliana in Vessel;
  species _1H_indole in Vessel; _1H_indole is "1H-indole";
  species s1 in Vessel; s1 is "(2S)-2-amino-3-phosphonooxypropanoic acid";
  species L_tryptophan in Vessel; L_tryptophan is "L-tryptophan";
  species hydrogenphosphate in Vessel;

  // Reactions:
  r0: _1H_indole + s1 => L_tryptophan + hydrogenphosphate; k_cat*TrpB2o_from_Arabidopsis_thaliana*s1/(k_m + s1); r0 is "indole fixed, o-phospho-L-serine varied";  // modifiers: TrpB2o_from_Arabidopsis_thaliana
    k_cat = 0.015 u0; k_m = 0.01 u1;

  // Unit definitions:
  unit u0 = 1 / (10 second); u0 is "1 / s";
  unit u1 = 1e-3 mole / (10 litre); u1 is "mM";
  unit u2 = 1e-6 mole / (10 litre); u2 is "uM";
  unit u3 = 10 kelvin; u3 is "K";
  unit u4 = 10 second; u4 is "sec";
end
