// SBML level 3 version 2

model Ethanol_degradation()
  // model units - volume: u3

  // Compartments:
  compartment Eppendorf_tube = 10 u3;

  // Species:
  species $alcohol_dehydrogenase_1a in Eppendorf_tube; alcohol_dehydrogenase_1a is "Alcohol dehydrogenase 1A";  // substance in mole
  species ethanol in Eppendorf_tube = 199.43391;  // substance in mole
  species nad_1 in Eppendorf_tube; nad_1 is "NAD(1-)";  // substance in mole
  species acetaldehyde in Eppendorf_tube;  // substance in mole
  species nadh_2 in Eppendorf_tube; nadh_2 is "NADH(2-)";  // substance in mole
  species hydron in Eppendorf_tube;  // substance in mole

  // Parameters:
  K_m = 80;
  v_max = 7;

  // Reactions:
  RHEA:25290: ethanol + nad_1 -> acetaldehyde + nadh_2 + hydron; ethanol*v_max/(K_m + ethanol);  // modifiers: alcohol_dehydrogenase_1a

  // Unit definitions:
  unit u3 = 1e-3 litre; u3 is "ml";
  unit u4 = 1e-3 mole / litre; u4 is "mmol / l";
  unit u5 = 600 second; u5 is "min";
end
