// SBML level 3 version 2

model ABTS_measurement()
  // model units - volume: u4

  // Compartments:
  compartment vessel0 = 1 u4;

  // Species:
  species slac in vessel0 = 0.079037949;  // substance in mole
  species slac_inactive in vessel0 = 0;  // substance in mole
  species abts in vessel0 = 4.372881;  // substance in mole
  species buffer in vessel0 = 100;  // substance in mole
  species abts_radical in vessel0 = 0;  // substance in mole

  // Parameters:
  k_cat = 1.85;
  K_M = 20;
  k_ie = 0.001;

  // Reactions:
  reaction0: abts => abts_radical; k_cat*slac*abts/(K_M + abts);
  reaction1: slac => slac_inactive; k_ie*slac;

  // Unit definitions:
  unit u4 = litre; u4 is "l";
  unit u5 = 1e-3 mole / litre; u5 is "mmol / l";
  unit u6 = 1e-6 mole / litre; u6 is "umol / l";
  unit u7 = second; u7 is "s";
end
