// SBML level 3 version 2

model Test()

  // Compartments:
  compartment Vessel_1 = 10 u0;

  // Species:
  species Enzyme in Vessel_1;
  species $Enzyme_Substrate_Complex; Enzyme_Substrate_Complex is "Enzyme-Substrate Complex";
  species Substrate in Vessel_1 = 0;
  species Product in Vessel_1 = 10;

  // Parameters:
  kcat has u5;
  K_m has u2;
  E_tot = 100 u2;

  // Rate rules:
  Product' = E_tot*kcat*Substrate/(K_m + Substrate);

  // Unit definitions:
  unit u0 = 1e-3 litre; u0 is "ml";
  unit u2 = 1e-3 mole / (10 litre); u2 is "mmol / l";
  unit u1 = 1 / (10 second); u1 is "s";
  unit u3 = 10 kelvin; u3 is "K";
  unit u4 = 1e-3 mole / (10 litre * 10 second); u4 is "mmol / l s";
  unit u5 = 1 / (10 second); u5 is "1 / s";
end
