// SBML level 3 version 2

model Test()

  // Compartments:
  compartment Vessel_1 = 10 u0;

  // Species:
  species Enzyme in Vessel_1;
  species Substrate in Vessel_1 = 0;
  species Product in Vessel_1 = 10;

  // Parameters:
  K_m has u2;
  kcat has u3;

  // Reactions:
  Reaction_1: Substrate => Product; kcat*Enzyme*Substrate/(K_m + Substrate);  // modifiers: Enzyme

  // Unit definitions:
  unit u0 = 1e-3 litre; u0 is "ml";
  unit u1 = 1e-3 mole / (10 litre * 10 second); u1 is "mmol / l s";
  unit u2 = 1e-3 mole / (10 litre); u2 is "mmol / l";
  unit u3 = 1 / (10 second); u3 is "1 / s";
  unit u4 = 1 / (10 second); u4 is "s";
  unit u5 = 10 kelvin; u5 is "K";
end
