// SBML level 3 version 2

model Test()

  // Compartments:
  compartment Vessel = 10 u0;

  // Species:
  species $Protein in Vessel = 10;  // substance in u1
  species Complex in Vessel = 10;  // substance in u1
  species Reactant in Vessel = 10;  // substance in u1
  species Reactant2 in Vessel = 10;  // substance in u1

  // Reactions:
  string: Reactant -> Reactant2; Reactant*x;  // modifiers: Protein
    x = 10 u3;

  // Unit definitions:
  unit u0 = 1e-3 litre; u0 is "ml";
  unit u1 = 1e-3 mole / (10 litre); u1 is "mmole / l";
  unit u2 = 10 kelvin; u2 is "K";
  unit u3 = 1 / (10 second); u3 is "1 / s";
  unit u4 = 10 second; u4 is "s";
end
